R1 := 24
R2 := 50
R3 := 36
R4 := 50
R5 := 70
R6 := 60
E4 := 6
E6 := 7
Ik := 0.08
I44 := Ik
Given
I1 - Ik - I4 - I6 == 0
I5 + I4 - I2 == 0
I7 - I3 - I5 + Ik == 0
I6 + I2 - I7 == 0
I5*R5 + I2*R2 + I7*0 == E6
I3*R3 + I1*R1 + I4*R4 - I5*R5 == E4 - E6
I6*R6 - I2*R2 - I4*R4 == 0
Find(I1, I2, I3, I4, I5, I6, I7) → [0.0793893129771; 0.0459541984733; 0.0793893129771; -0.0212213740458; 0.0671755725191; 0.0206106870229; 0.0665648854962]
I1 := 0.0793893129771
I2 := 0.0459541984733
I3 := 0.0793893129771
I4 := -0.0212213740458
I5 := 0.0671755725191
I6 := 0.0206106870229
I7 := 0.0665648854962
U31 := I1*R1 + I3*R3 - E4
Ppotr := I1^2*R1 + I2^2*R2 + I3^2*R3 + I4^2*R4 + I5^2*R5 + I6^2*R6
Pist := E6*I5 + E4*I3 + U31*Ik
Ppotr = 0.847634
Pist = 0.847634
I11*(R2 + R5) - I22*R5 - I33*R2 == E6
-I33*R4 + I22*(R1 + R3 + R4 + R5) - I11*R5 == E4 - E6 - I44*(R1 + R3)
-I11*R2 - I22*R4 + I33*(R2 + R4 + R6) == 0
Δ := [(R2 + R5), -R5, -R2; -R4, (R1 + R3 + R4 + R5), -R5; -R2, -R4, (R2 + R4 + R6)]
Δ1 := [E6, -R5, -R2; (E4 - E6 - I44*(R1 + R3)), (R1 + R3 + R4 + R5), -R5; 0, -R4, (R2 + R4 + R6)]
Δ2 := [(R2 + R5), E6, -R2; -R4, (E4 - E6 - I44*(R1 + R3)), -R5; -R2, 0, (R2 + R4 + R6)]
Δ3 := [(R2 + R5), -R5, E6; -R4, (R1 + R3 + R4 + R5), (E4 - E6 - I44*(R1 + R3)); -R2, -R4, 0]
I11 := Δ1/Δ = [-0.726389, -0.934843, -0.94849; 0.675278, 1.36566, 0.371002; 0.763889, 0.413647, 1.41969]
det([-0.726, -0.935, -0.948; 0.675, 1.366, 0.371; 0.764, 0.414, 1.42]) = 0.0588868
I22 := Δ2/Δ = [1.53472, 0.77651, 0.506824; -1.29028, -0.873708, -1.22296; 0.347222, 0.504227, 1.32911]
det([1.535, 0.777, 0.507; -1.29, -0.874, -1.223; 0.347, 0.504, 1.329]) = -0.010328
det([1.396, 0.327, 0.623; 0.446, 1.368, 0.702; -1.111, -0.918, -0.749]) = 0.0152392
I33 := Δ3/Δ = [1.39583, 0.326993, 0.623007; 0.445833, 1.3683, 0.701703; -1.11111, -0.917874, -0.748792]
I11 := 0.059
I22 := -0.01
I33 := 0.015
# Вот тут я делаю проверку и не понимаю почему отличаются значения
I11*(R2 + R5) - I22*R5 - I33*R2 = 7.03
-I11*R2 - I22*R4 + I33*(R2 + R4 + R6) = -0.05
-I33*R4 + I22*(R1 + R3 + R4 + R5) - I11*R5 = -6.68
E4 - E6 - I44*(R1 + R3) = -5.8
